*Heading
** Job name: Carrgamento_min_max Model name: todas_peças
** Generated by: Abaqus/CAE Student Edition 2020
*Preprint, echo=NO, model=NO, history=NO, contact=NO
**
** PARTS
**
*Part, name="landing gear st-3"
*Node
      1,   1.42687452,  0.173187956, -0.224999994
      2,   1.17844939,  0.603473008, -0.224999994
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*Element, type=C3D8R
 1,   8,  38, 235,  43,   1,  29, 231,  36
 2,  38,  37, 236, 235,  29,  30, 232, 231
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*Nset, nset=_PickedSet22, internal, generate
   1,  454,    1
*Elset, elset=_PickedSet22, internal, generate
   1,  176,    1
** Section: Section-2
*Solid Section, elset=_PickedSet22, material=aco
,
*End Part
**
**
** ASSEMBLY
**
*Assembly, name=Assembly
**
*Instance, name="landing gear st-3-1", part="landing gear st-3"
*End Instance
**
*Nset, nset=_PickedSet12, internal, instance="landing gear st-3-1"
 17, 18, 19, 20, 69, 70, 71, 72
*Elset, elset=_PickedSet12, internal, instance="landing gear st-3-1", generate
 100,  102,    1
*Elset, elset=__PickedSurf13_S3, internal, instance="landing gear st-3-1", generate
 103,  131,    4
*Elset, elset=__PickedSurf13_S4, internal, instance="landing gear st-3-1", generate
 103,  131,    4
*Elset, elset=__PickedSurf13_S5, internal, instance="landing gear st-3-1", generate
 104,  132,    4
*Elset, elset=__PickedSurf13_S6, internal, instance="landing gear st-3-1", generate
 104,  132,    4
*Surface, type=ELEMENT, name=_PickedSurf13, internal
__PickedSurf13_S3, S3
__PickedSurf13_S4, S4
__PickedSurf13_S6, S6
__PickedSurf13_S5, S5
*Elset, elset=__PickedSurf17_S5, internal, instance="landing gear st-3-1", generate
 105,  133,    4
*Elset, elset=__PickedSurf17_S6, internal, instance="landing gear st-3-1", generate
 105,  133,    4
*Elset, elset=__PickedSurf17_S3, internal, instance="landing gear st-3-1", generate
 106,  134,    4
*Elset, elset=__PickedSurf17_S4, internal, instance="landing gear st-3-1", generate
 106,  134,    4
*Surface, type=ELEMENT, name=_PickedSurf17, internal
__PickedSurf17_S5, S5
__PickedSurf17_S6, S6
__PickedSurf17_S4, S4
__PickedSurf17_S3, S3
*End Assembly
**
** MATERIALS
**
*Material, name=aco
*Density
 9e-06,
*Elastic
210000., 0.3
**
** BOUNDARY CONDITIONS
**
** Name: BC-1 Type: Symmetry/Antisymmetry/Encastre
*Boundary
_PickedSet12, ENCASTRE
** ----------------------------------------------------------------
**
** STEP: load_min
**
*Step, name=load_min, nlgeom=NO
*Static
1., 1., 1e-05, 1.
**
** LOADS
**
** Name: Load-1   Type: Pressure
*Dsload
_PickedSurf13, P, 2254.15
**
** OUTPUT REQUESTS
**
*Restart, write, frequency=0
**
** FIELD OUTPUT: F-Output-1
**
*Output, field
*Node Output
CF, RF, U
*Element Output, directions=YES
LE, MISES, MISESMAX, MISESONLY, PE, PEEQ, PEMAG, S
*Contact Output
CDISP, CSTRESS
**
** HISTORY OUTPUT: H-Output-1
**
*Output, history, variable=PRESELECT
*End Step
** ----------------------------------------------------------------
**
** STEP: Step-3
**
*Step, name=Step-3, nlgeom=NO
*Static
1., 1., 1e-05, 1.
**
** LOADS
**
** Name: Load-1   Type: Pressure
*Dsload, op=NEW
**
** OUTPUT REQUESTS
**
*Restart, write, frequency=0
**
** FIELD OUTPUT: F-Output-1
**
*Output, field
*Node Output
CF, RF, U
*Element Output, directions=YES
LE, MISES, MISESMAX, MISESONLY, PE, PEEQ, PEMAG, S
*Contact Output
CDISP, CSTRESS
**
** HISTORY OUTPUT: H-Output-1
**
*Output, history, variable=PRESELECT
*End Step
** ----------------------------------------------------------------
**
** STEP: load_max
**
*Step, name=load_max, nlgeom=NO
*Static
1., 1., 1e-05, 1.
**
** LOADS
**
** Name: Load-2   Type: Pressure
*Dsload
_PickedSurf17, P, 2254.15
**
** OUTPUT REQUESTS
**
*Restart, write, frequency=0
**
** FIELD OUTPUT: F-Output-1
**
*Output, field
*Node Output
CF, RF, U
*Element Output, directions=YES
LE, MISES, MISESMAX, MISESONLY, PE, PEEQ, PEMAG, S
*Contact Output
CDISP, CSTRESS
**
** HISTORY OUTPUT: H-Output-1
**
*Output, history, variable=PRESELECT
*End Step
